units real
atom_style atomic
boundary p p p
atom_modify sort 0 0.0
atom_modify map array
newton on

read_data data.in

pair_style chimesFF
pair_coeff * * params.txt

compute fprop all property/atom fx fy fz
dump 1 all custom 1 forces.dump id type fx fy fz
dump_modify 1 sort id

run 0
